V_o := V_n*(1/R + C_o*s + C_c*s + C_m*s)^-1/(1/(C_n*s) + (1/R + C_o*s + C_c*s + C_m*s)^-1) simplify → C_n*V_n*R*s/(C_c*R*s + C_m*R*s + C_n*R*s + C_o*R*s + 1)
I_o := V_o*C_c*s simplify → C_c*C_n*V_n*R*s^2/(C_c*R*s + C_m*R*s + C_n*R*s + C_o*R*s + 1)
I_o := C_c*C_n*V_n*R*s^2/(s*R*(C_c + C_n + C_o + C_m) + 1)
I_o := C_c*C_n*V_n*R*s^2/(s*R*(C_c + C_n + C_o + C_m) + 1)
I_o := C_c*C_n*V_n*R/(R*(C_c + C_n + C_o + C_m))*s^2/(s + 1/(R*(C_c + C_n + C_o + C_m)))
I_o := C_c*C_n*V_n/(C_c + C_n + C_o + C_m)*s^2/(s + 1/(R*(C_c + C_n + C_o + C_m)))
I_o := C_c*C_n*V_n/(C_c + C_n + C_o + C_m)*s*s/(s + 1/(R*(C_c + C_n + C_o + C_m)))
I_o := C_c*C_n*V_n/(C_c + C_n + C_o + C_m)*s*s/(s + 1/(R*(C_c + C_n + C_o + C_m)))
# Det antages at C_c>>C_o + C_n
I_o := C_n*V_n*s*s/(s + 1/(R*C_c))
# Signalet har meget stor frekvens, derfor sættes højpasfilteret til at være 1
I_o := C_c*C_n/(C_c + C_n + C_o + C_m)*V_n(s)*s
i_o := C_c*C_n/(C_c + C_n + C_o + C_m)*d/dt(v_n(t))
t_rise := 65 ns
V_DD := 5 V
C_n' := 10 pF/m
l_n := 15 mm*2*π = 0.0942478 m
C_m' := 45 pF/m
l_m := 10 mm*2*π = 0.0628319 m
C_c := 0.01 μF
C_n := C_n'*l_n = 0.942478 pF
C_o := 5 pF
C_m := C_m'*l_m = 2.82743 pF
i_o := C_c*C_n/(C_c + C_n + C_o + C_m)*d/dt(v_n(t))
i_o := C_c*C_n/(C_c + C_n + C_o + C_m)*V_DD/t_rise = 72.4348 μA
i_o := C_c*C_n*V_DD/t_rise = 7.24983e-7 μA*F
v_e := i_o
