R := 80 kΩ
C_f := 4.6 pF
GBW := 1000 kHz
ω_G := 2*π*GBW
1/(4*ω_G*R) = 0.497359 pF
C_p := 1/(4*ω_G*R) - 1/2*(1 - 1/2*ω_G*R*C_f)*C_f = 0.856403 pF
1/2*(1 - 1/2*ω_G*R*C_f)*C_f = -0.359044 pF
R_1 := 10 kΩ
T := 300 K
R_f := 80 kΩ
i_nR1 := sqrt(4*k*T/R_1) = 1.28716 pA/sqrt(Hz)
e_noR1 := i_nR1*R_f = 102.973 nV/sqrt(Hz)
k = 1.38065e-23*(V/sqrt(Hz*Ω*K))^2
e_nRf := sqrt(4*k*R_f*T) = 36.4064 nV/sqrt(Hz)
e_noRf := e_nRf
q := 1.6*10^-19 C
I_0 := 2.8 V/(10 kΩ) = 0.28 mA
i_nD := sqrt(2*q*I_0) = 9.46573 pA/sqrt(Hz)
e_noD := R_f*i_nD
e_ntot := sqrt(e_noR1^2 + e_noRf^2 + e_noD^2) = 765.094 nV/sqrt(Hz)
E_ntot := e_ntot*sqrt(4 kHz*π/4) = 42.8835 μV
757.258*nV/sqrt(Hz)*sqrt(4 kHz*π/4) = 42.4442 μV
