Z_R := R  # error: {0} has multiple definitions, you must specify the label to select the definition that you want.
Z_Cd := 1/(C_d*s)  # error: This variable is undefined. Check that the label is set correctly.
Z_Cb := 1/(C_b*s)  # error: This variable is undefined. Check that the label is set correctly.
# 1)
I_in_1 := I_d*Z_Cb^-1/(Z_R^-1 + Z_Cd^-1 + Z_Cb^-1) simplify → C_b*I_d*R*s/(C_b*R*s + C_d*R*s + 1)
# 2)
# Da V_dd er DC fungerer kondensatorerne som et åbent kredsløb. Derfor er I_in_2 := 0
# 3)
# Da V_ref er DC fungerer C_b som et åbent kredsløb. Derfor er I_in_3 := 0
# Totalt:
I_in == I_in_1 + I_in_2 + I_in_3
I_in := I_in_1 simplify → C_b*I_d*R*s/(C_b*R*s + C_d*R*s + 1)
G(s) == C_b*R*s/((C_b*R + C_d*R)*s + 1) == C_b*R*s/(C_b*R + C_d*R)/(s + 1/(C_b*R + C_d*R)) == C_b*R/(C_b*R + C_d*R)*s/(s + 1/(C_b*R + C_d*R))
G(s) == C_b*R/(C_b*R + C_d*R)*s/(s + 1/(C_b*R + C_d*R))
# Da C_b>>C_d
G(s) == C_b*R/(C_b*R)*s/(s + 1/(C_b*R)) == s/(s + 1/(C_b*R))
# Det ses at der er et højpas-filter der har en cutoff-frekvens på 1/(C_b*R)
R := 10 kΩ
C_d := 3.5 pF
C_b := 0.1 μF
1/(C_b*R) = 1000 1/s
G(s) := s/(s + 1/(C_b*R))
f := 10 Hz, 10.1 Hz .. 1 kHz
# [plot: 20*log(|G(1j*f*2*π)|) vs f]
V_ref(s) := v_ref/s  # error: This variable is undefined. Check that the label is set correctly.
V_dd(s) := v_dd/s  # error: This variable is undefined. Check that the label is set correctly.
I_d(s) := ω/(ω^2 + s^2)  # error: This variable is undefined. Check that the label is set correctly.
